*HEADING
[15] Deformable thick needle + cohesive + layer damage(deletion)
Skin: 3-layer VUMAT hyperelastic+damage; r=50 um: COHAX4 ; um,uN,MPa,s
*NODE
1, 0.0000, 0.0000
2, 5.0000, 0.0000
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*ELEMENT, TYPE=CAX4R
1, 1, 2, 10002, 10001
2, 2, 3, 10003, 10002
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*ELEMENT, TYPE=COHAX4
1021, 11, 10011, 5010000, 5000000
1022, 10011, 20011, 5020000, 5010000
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*ELSET, ELSET=STRATUM
749, 750, 751, 752, 753, 754
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*ELSET, ELSET=EPIDERMIS
477, 478, 479, 480, 481, 482
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*ELSET, ELSET=DERMIS
1, 2, 3, 4, 5, 6
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*ELSET, ELSET=BULK
STRATUM, EPIDERMIS, DERMIS
*ELSET, ELSET=CORE
1, 2, 3, 4, 5, 6
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*ELSET, ELSET=COH, GENERATE
1021, 1050, 1
*SURFACE, TYPE=ELEMENT, NAME=SKIN_SURF
BULK,
*NSET, NSET=NBOT
1, 2, 3, 4, 5, 6
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*NSET, NSET=NAXIS, GENERATE
1, 300001, 10000
*NSET, NSET=NRIGHT, GENERATE
5000024, 5300024, 10000
**
** --- Deformable needle wall (CAX4R): bore 30, tip 50, shaft 150
*NODE
6000000, 30.0000, 1550.0000
6000001, 35.0000, 1550.0000
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*NSET, NSET=NREF
9999,
*ELEMENT, TYPE=CAX4R
1051, 6000000, 6000001, 6001001, 6001000
1052, 6000001, 6000002, 6001002, 6001001
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*ELSET, ELSET=NEEDLE_EL, GENERATE
1051, 1290, 1
*SURFACE, TYPE=ELEMENT, NAME=NEEDLE
NEEDLE_EL,
*NSET, NSET=NDLTOP
6060000, 6060001, 6060002, 6060003, 6060004
*SURFACE, TYPE=NODE, NAME=NDLTOP_S
NDLTOP,
*MATERIAL, NAME=NEEDLE_MAT
*DENSITY
7.9e-15,
*ELASTIC
2e+05, 0.3
*SOLID SECTION, ELSET=NEEDLE_EL, MATERIAL=NEEDLE_MAT
*MATERIAL, NAME=MAT_STRATUM
*DENSITY
1.2e-15,
*USER MATERIAL, CONSTANTS=4
1.0, 0.02, 1.2, 1.5
*DEPVAR, DELETE=1
4
1, DELFLAG, deletion flag
2, LAMMAX, max principal stretch
3, DAMAGE, damage variable
4, JVOL, relative volume
*MATERIAL, NAME=MAT_EPIDERMIS
*DENSITY
1.1e-15,
*USER MATERIAL, CONSTANTS=4
0.1, 0.1, 1.4, 1.9
*DEPVAR, DELETE=1
4
1, DELFLAG, deletion flag
2, LAMMAX, max principal stretch
3, DAMAGE, damage variable
4, JVOL, relative volume
*MATERIAL, NAME=MAT_DERMIS
*DENSITY
1.1e-15,
*USER MATERIAL, CONSTANTS=4
0.02, 1.0, 1.6, 2.5
*DEPVAR, DELETE=1
4
1, DELFLAG, deletion flag
2, LAMMAX, max principal stretch
3, DAMAGE, damage variable
4, JVOL, relative volume
*SECTION CONTROLS, NAME=SKINCTRL, DISTORTION CONTROL=YES, HOURGLASS=ENHANCED
*SOLID SECTION, ELSET=STRATUM, MATERIAL=MAT_STRATUM, CONTROLS=SKINCTRL
*SOLID SECTION, ELSET=EPIDERMIS, MATERIAL=MAT_EPIDERMIS, CONTROLS=SKINCTRL
*SOLID SECTION, ELSET=DERMIS, MATERIAL=MAT_DERMIS, CONTROLS=SKINCTRL
*MATERIAL, NAME=COHMAT
*DENSITY
1.1e-15,
*ELASTIC, TYPE=TRACTION
4, 4, 4
*DAMAGE INITIATION, CRITERION=MAXS
2, 2, 2
*DAMAGE EVOLUTION, TYPE=ENERGY
5,
*COHESIVE SECTION, ELSET=COH, MATERIAL=COHMAT, RESPONSE=TRACTION SEPARATION, THICKNESS=SPECIFIED
1,
*COUPLING, CONSTRAINT NAME=NDL_GRIP, REF NODE=9999, SURFACE=NDLTOP_S
*KINEMATIC
1, 2
*SURFACE INTERACTION, NAME=IPROP
*FRICTION
0.1,
*SURFACE BEHAVIOR, PRESSURE-OVERCLOSURE=HARD
*BOUNDARY
NBOT, 2, 2
NAXIS, 1, 1
NRIGHT, 1, 1
NREF, 1, 1
NREF, 6, 6
*AMPLITUDE, NAME=PUSH, DEFINITION=SMOOTH STEP
0.0, 0.0, 0.03, 1.0
*STEP, NAME=PENETRATION
*DYNAMIC, EXPLICIT
, 0.03
*FIXED MASS SCALING, DT=2.0e-7, TYPE=BELOW MIN
*BOUNDARY, AMPLITUDE=PUSH
NREF, 2, 2, -300.0
*CONTACT
*CONTACT INCLUSIONS, ALL EXTERIOR
*CONTACT INCLUSIONS
NEEDLE, SKIN_SURF
*CONTACT PROPERTY ASSIGNMENT
 ,  , IPROP
*OUTPUT, FIELD, NUMBER INTERVAL=30
*ELEMENT OUTPUT, ELSET=BULK
S, LE, SDV, STATUS
*ELEMENT OUTPUT, ELSET=COH
SDEG, STATUS
*ELEMENT OUTPUT, ELSET=NEEDLE_EL
S, LE
*NODE OUTPUT
U, V
*OUTPUT, HISTORY, TIME INTERVAL=1.0e-4
*NODE OUTPUT, NSET=NREF
U2, V2, RF2
*ENERGY OUTPUT
ALLIE, ALLKE, ALLSE, ALLDMD
*END STEP
