*HEADING
[17] Paper-aligned (Yolai 2025): Ogden 2-layer skin, pure deletion
Units: mm, N, MPa, tonne, s ; von Mises + strain failure, no cohesive
*NODE
1, 0.000000, 0.000000
2, 0.008000, 0.000000
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*ELEMENT, TYPE=CAX4R
1, 1, 2, 100002, 100001
2, 2, 3, 100003, 100002
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*ELSET, ELSET=EPIDERMIS
3622, 3623, 3624, 3625, 3626, 3627
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*ELSET, ELSET=DERMIS
1, 2, 3, 4, 5, 6
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*ELSET, ELSET=SKIN_ALL
EPIDERMIS, DERMIS
*SURFACE, TYPE=ELEMENT, NAME=SKIN_SURF
SKIN_ALL,
*NSET, NSET=NBOT
1, 2, 3, 4, 5, 6
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*NSET, NSET=NAXIS
1, 100001, 200001, 300001, 400001, 500001
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*NSET, NSET=NRIGHT
52, 100052, 200052, 300052, 400052, 500052
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*NODE
9999, 0.0, 2.550000
*NSET, NSET=NREF
9999,
*SURFACE, TYPE=SEGMENTS, NAME=NEEDLE, FILLET RADIUS=0.01
START, 0.15000, 4.75000
LINE,  0.15000, 3.75000
LINE,  0.02000, 2.57000
CIRCL, 0.0, 2.55000, 0.0, 2.57000
*RIGID BODY, ANALYTICAL SURFACE=NEEDLE, REF NODE=NREF
*MATERIAL, NAME=MAT_EPIDERMIS
*DENSITY
1.3e-9,
*USER MATERIAL, CONSTANTS=5
0.752, 8.68, 1.03e-7, 5.8, 0.084
*DEPVAR, DELETE=1
4
1, DELFLAG, deletion flag
2, SVM, von Mises stress
3, EEQ, equivalent log strain
4, JVOL, relative volume
*MATERIAL, NAME=MAT_DERMIS
*DENSITY
1.2e-9,
*USER MATERIAL, CONSTANTS=5
7.33, 57.89, 1.03e-7, 15.0, 0.45
*DEPVAR, DELETE=1
4
1, DELFLAG, deletion flag
2, SVM, von Mises stress
3, EEQ, equivalent log strain
4, JVOL, relative volume
*SECTION CONTROLS, NAME=SKINCTRL, HOURGLASS=ENHANCED
*SOLID SECTION, ELSET=EPIDERMIS, MATERIAL=MAT_EPIDERMIS, CONTROLS=SKINCTRL
*SOLID SECTION, ELSET=DERMIS, MATERIAL=MAT_DERMIS, CONTROLS=SKINCTRL
*SURFACE INTERACTION, NAME=IPROP
*FRICTION
0.42,
*SURFACE BEHAVIOR, PRESSURE-OVERCLOSURE=HARD
*BOUNDARY
NBOT, 1, 2
NRIGHT, 1, 2
NAXIS, 1, 1
NREF, 1, 1
NREF, 6, 6
*AMPLITUDE, NAME=PUSH, DEFINITION=SMOOTH STEP
0.0, 0.0, 0.02, 1.0
*STEP, NAME=INSERTION
*DYNAMIC, EXPLICIT
, 0.02
*FIXED MASS SCALING, DT=5.0e-7, TYPE=BELOW MIN
*BOUNDARY, AMPLITUDE=PUSH
NREF, 2, 2, -1.0000
*CONTACT
*CONTACT INCLUSIONS, ALL EXTERIOR
*CONTACT PROPERTY ASSIGNMENT
 ,  , IPROP
*OUTPUT, FIELD, NUMBER INTERVAL=30
*ELEMENT OUTPUT, ELSET=SKIN_ALL
S, LE, SDV, STATUS
*NODE OUTPUT
U, V
*OUTPUT, HISTORY, TIME INTERVAL=1.0e-4
*NODE OUTPUT, NSET=NREF
U2, V2, RF2
*ENERGY OUTPUT
ALLIE, ALLKE, ALLSE, ALLWK
*END STEP
